# imports (SmallTalk LIBrary)
from stlib.scene import MainHeader, ContactHeader
from stlib.visuals import ShowGrid
from stlib.physics import Floor
from stlib.physics import Cube

def createScene(rootNode):

  # main header (rootNode + gravity)
  MainHeader(rootNode, gravity=[0.0,-981.0,0.0])

  # contact header
  ContactHeader(rootNode, alarmDistance=8,
               contactDistance=5)

  # shows the grid outline
  ShowGrid(rootNode)

  # base floor
  Floor(rootNode,
       translation=[0.0,-180.0,0.0],
       uniformScale=5.0,
       isAStaticObject=True)

  # obstacle floor
  Floor(rootNode,
        name="Floor Obstacle",
        translation=[0.0,-90.0,0.0],
        color=[0.0,1.0,0.0],
        uniformScale=0.8,
        isAStaticObject=True)

  # creates 7 cubes
  for i in range(7):
    Cube(rootNode,
         name="Cube"+str(-210+c*70),
         translation=[-210+c*70,0.0,0.0],
         color=[c/10.0,c*0.7/10.0,0.9],
         uniformScale=20.0)

  return rootNode
